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/batch
! ANSYS input file written by Workbench version 2025 R2
! File used for geometry attach: C:\Users\FRIED\AppData\Local\Temp\WB_FRIED_26404_6\wbnew_files\dp0\SYS-1\DM\SYS-1.agdb
/title,wbnew--Static Structural (B5)
/COM,/COM,     ANSYSMotion, 2025.2
/com,--- Data in consistent MKS units. See Solving Units in the help system for more information.
/units,MKS
/prep7
! Turn off shape checking because checks already performed inside WB mesher.
! See help system for more information.
SHPP,OFF,,NOWARN
etcon,set             ! allow ANSYS to choose best KEYOP's for 180x elements, resets any applicable keyopt to MAPDL defaults
/com,*********** Send User Defined Coordinate System(s) ***********
csys,0
/com,*********** Nodes for the whole assembly ***********
nblock,3,,44721
(1i9,3e20.9e3)
        1    -4.210557331E-02    -8.197686347E-03     0.000000000E+00
        2    -5.277624030E-02    -6.288904940E-02     0.000000000E+00
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-1
/com,*********** Elements for Body 1 'Surface Body' ***********
et,1,183
keyo,1,3,3
MAT,1 $ TYPE,1 $ REAL,1 $ SECNUM,1 $ ESYS,0
eblock,11,COMPACT,,13356
(11i9)
       77      172    12799     2300     2300    13816    39698     2300    13817
      727    12737     1566    12752    12752    15180    15182    12752    39650
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-1
secnum,1    ! reset the section ID to default
toffst,273.15,      ! Temperature offset from absolute zero
/com,*********** Set Reference Temperature ***********
tref,22.
/com,*********** Send Materials ***********
Temperature = 'TEMP' ! Temperature
MP,DENS,1,7850,	! kg m^-3
MP,ALPX,1,1.2e-05,	! C^-1
MP,C,1,434,	! J kg^-1 C^-1
MP,KXX,1,60.5,	! W m^-1 C^-1
MP,RSVX,1,1.7e-07,	! kg m^3 A^-2 s^-3
MP,EX,1,200000000000,	! Pa
MP,NUXY,1,0.3,
MP,MURX,1,10000,

/com,*********** Send Sheet Properties ***********
r,1,1.e-003

!************************* Model Summary ********************
!Surface Body,	Structural Steel,	matid,	1
!************************* End Model Summary ********************
/com,*********** Define Pressure Using Surface Effect Elements "Pressure" ***********
et,2,153
keyop,2,3,10        ! get plane stress option and thickness from underlying element
MAT,2 $ TYPE,2 $ REAL,2 $ SECNUM,2 $ ESYS,0
eblock,11,COMPACT,,120
(11i9)
    13357     3356     3350    17042
    13358     3378     3356    17066
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-1
secnum,1    ! reset the section ID to default
esel,s,type,,2
keyop,2,7,0         ! Use deformed area for application of load
esel,all
et,3,14   ! spring element type
keyo,3,3,2          ! UX, UY DOF only since 2D
/com,*********** Construct Weak Springs, Prototype 1 ***********
*set,_delta,1.27793147538749e-002
type,3
mat,4
real,4
r,4,0.203154770667572
nsel,all
*get,_nspr,ndmx
_nspr=_nspr+1
esel,s,type,,1
nsle,s,active
*get,_minx,node,0,mnloc,x
*get,_miny,node,0,mnloc,y
*get,_maxx,node,0,mxloc,x
*get,_maxy,node,0,mxloc,y
*dim,_ntets,arra,4
_ntets(1) = NODE(_minx,_miny,0)
_ntets(2) = NODE(_minx,_maxy,0)
_ntets(3) = NODE(_maxx,_miny,0)
_ntets(4) = NODE(_maxx,_maxy,0)
*do,_i,1,4
  n,_nspr,nx(_ntets(_i))+_delta,ny(_ntets(_i)),0
  e,_ntets(_i),_nspr
  d,_nspr,all
  _nspr=_nspr+1
  n,_nspr,nx(_ntets(_i)),ny(_ntets(_i))+_delta,0
  e,_ntets(_i),_nspr
  d,_nspr,all
  _nspr=_nspr+1
*enddo
*set,_ntets
nsel,all
esel,all
esel,all
fini
/com,****************************************************************************
/com,*************************    SOLUTION       ********************************
/com,****************************************************************************
/solu
antype,0                   ! static analysis
_thickRatio=  0     ! Ratio of thick parts in the model
eqsl,sparse,,,,,1
cntr,print,1               ! print out contact info and also make no initial contact an error
cncheck,dmp		!	Enable program controlled contact splitting for distributed memory parallel run
dmpoption,emat,no             ! Don't combine emat file for DANSYS
dmpoption,esav,no             ! Don't combine esav file for DANSYS
nldiag,cont,iter           ! print out contact info each equilibrium iteration
rescontrol,,none                 ! Do not keep any restart files
/com,****************************************************
/com,******************* SOLVE FOR LS 1 OF 1 ****************
esel,s,type,,2
nsle
sf,all,pres,-50000000.
nsel,all
esel,all
esel,all
nsub,1,1,1
time,1.
outres,erase
outres,all,none
outres,nsol,all,
outres,rsol,all
outres,eangl,all
outres,etmp,all
outres,veng,all
outres,strs,all,
outres,epel,all,
outres,eppl,all,
outres,cont,all,
! *********** WB SOLVE COMMAND ***********
! check interactive state
*get,ANSINTER_,active,,int
*if,ANSINTER_,ne,0,then
/eof
*endif
solve
/com *************** Write FE CONNECTORS *********
CEWRITE,file,ce,,INTE
/com,****************************************************
/com,*************** FINISHED SOLVE FOR LS 1 *************
*get,_NSOLTHREADS,active,0,ntfs
*get,_NSOLPROCESSES,active,0,npfs
/post1
fini
